# OpenSim document version 40500
MarkerSet:
  Marker R.ASIS: pelvis (0.01967753 0.0322871 0.1562284)
  Marker L.ASIS: pelvis (0.01379958 0.04748374 -0.1614721)
  Marker V.Sacral: pelvis (-0.1597796 0.0355793 0.001008595)
  Marker R.Knee.Lat: femur_r (-0.02446561 -0.4251662 0.04402713)
  Marker R.Knee.Med: femur_r (-0.03111731 -0.4271289 -0.04155713)
  Marker L.Knee.Lat: femur_l (-0.019613 -0.435466 -0.04573892)
  Marker L.Knee.Med: femur_l (-0.03419937 -0.4325277 0.03966956)
  Marker R.Ankle.Lat: tibia_r (-0.005266932 -0.4382302 0.04180551)
  Marker R.Ankle.Med: tibia_r (-0.004869245 -0.4401243 -0.02003)
  Marker L.Ankle.Lat: tibia_l (-0.01601039 -0.4450532 -0.03449626)
  Marker L.Ankle.Med: tibia_l (-0.01631428 -0.4456578 0.02791989)
  Marker R.Shank.Front: tibia_r (0.03367483 -0.05007799 -0.0008894441)
  Marker L.Shank.Front: tibia_l (0.04258925 -0.05660234 0.001210186)
  Marker R.Heel: calcn_r (0.0004003555 0.02568448 -0.02067614)
  Marker L.Heel: calcn_l (0.003323626 0.01512227 -0.0001779132)
  Marker R.Toe.Tip: calcn_r (0.2451548 0.01767573 0.006792083)
  Marker L.Toe.Tip: calcn_l (0.2670705 0.01307087 -0.007386517)
  Marker R.Midfoot.Lat: calcn_r (0.1663517 -0.01774288 0.04637886)
  Marker L.Midfoot.Lat: calcn_l (0.1862259 -0.0254237 -0.05548043)
  Marker R.Toe.Med: calcn_r (0.1809423 -0.01208579 -0.04456356)
  Marker L.Toe.Med: calcn_l (0.1874086 -0.03512029 0.03653093)
  Marker Sternum: torso (0.09716881 0.4876628 -0.001233262)
  Marker Top.Head: torso (-0.1119805 0.8085245 0.01240067)
  Marker R.Acromium: torso (0.01613117 0.4718112 0.1743412)
  Marker L.Acromium: torso (0.01498182 0.4776399 -0.1849959)
