# OpenSim document version 40500
InverseKinematicsTool sprint_ik:
  results_directory: ../out
  model_file: ../out/SB25_scaled.osim
  constraint_weight: Inf
  accuracy: 1e-5
  time_range: 0 8.833333
  output_motion_file: ../out/SB25_ik.mot
  report_errors: true
  marker_file: ../trc/SB25.trc
  report_marker_locations: false
  IKTaskSet:
    IKMarkerTask R.ASIS: apply=true weight=10
    IKMarkerTask L.ASIS: apply=true weight=10
    IKMarkerTask V.Sacral: apply=true weight=10
    IKMarkerTask R.Knee.Lat: apply=true weight=5
    IKMarkerTask R.Knee.Med: apply=true weight=5
    IKMarkerTask L.Knee.Lat: apply=true weight=5
    IKMarkerTask L.Knee.Med: apply=true weight=5
    IKMarkerTask R.Ankle.Lat: apply=true weight=5
    IKMarkerTask R.Ankle.Med: apply=true weight=5
    IKMarkerTask L.Ankle.Lat: apply=true weight=5
    IKMarkerTask L.Ankle.Med: apply=true weight=5
    IKMarkerTask R.Shank.Front: apply=true weight=2
    IKMarkerTask L.Shank.Front: apply=true weight=2
    IKMarkerTask R.Heel: apply=true weight=2
    IKMarkerTask L.Heel: apply=true weight=2
    IKMarkerTask R.Toe.Tip: apply=true weight=2
    IKMarkerTask L.Toe.Tip: apply=true weight=2
    IKMarkerTask R.Midfoot.Lat: apply=true weight=1
    IKMarkerTask L.Midfoot.Lat: apply=true weight=1
    IKMarkerTask R.Toe.Med: apply=true weight=1
    IKMarkerTask L.Toe.Med: apply=true weight=1
    IKMarkerTask Sternum: apply=true weight=1
    IKMarkerTask Top.Head: apply=true weight=0.5
    IKMarkerTask R.Acromium: apply=true weight=1
    IKMarkerTask L.Acromium: apply=true weight=1
