# OpenSim document version 40500
ScaleTool sprint_gait2392:
  mass: -1
  height: 1925
  age: -1
  notes:
    NOVEL/EXPERIMENTAL. MASS UNMEASURED — generic gait2392 masses retained. Stature-scaled then marker-pair refined.
  GenericModelMaker:
    model_file: ../models/gait2392_simbody.osim
    marker_set_file: SB25_markerset.xml
  ModelScaler:
    apply: true
    scaling_order: manualScale measurements
    marker_file: ../trc/SB25.trc
    time_range: 0 8.833333
    preserve_mass_distribution: true
    output_model_file: ../out/SB25_scaled.osim
    output_scale_file: ../out/SB25_scaleSet.xml
    MeasurementSet:
      Measurement torso: apply=true
        MarkerPair: markers=(V.Sacral Top.Head)
        BodyScale torso: axes=(X Y Z)
      Measurement pelvis: apply=true
        MarkerPair: markers=(R.ASIS L.ASIS)
        BodyScale pelvis: axes=(X Y Z)
      Measurement shank: apply=true
        MarkerPair: markers=(R.Shank.Front R.Ankle.Lat)
        MarkerPair: markers=(L.Shank.Front L.Ankle.Lat)
        BodyScale tibia_r: axes=(X Y Z)
        BodyScale tibia_l: axes=(X Y Z)
        BodyScale talus_r: axes=(X Y Z)
        BodyScale talus_l: axes=(X Y Z)
      Measurement foot: apply=true
        MarkerPair: markers=(R.Heel R.Toe.Tip)
        MarkerPair: markers=(L.Heel L.Toe.Tip)
        BodyScale calcn_r: axes=(X Y Z)
        BodyScale calcn_l: axes=(X Y Z)
        BodyScale toes_r: axes=(X Y Z)
        BodyScale toes_l: axes=(X Y Z)
    ScaleSet:
      Scale [values shared by the 12 below unless stated]: scales=(1.069444 1.069444 1.069444) apply=true
      Scale: segment=pelvis
      Scale: segment=femur_r
      Scale: segment=tibia_r
      Scale: segment=talus_r
      Scale: segment=calcn_r
      Scale: segment=toes_r
      Scale: segment=femur_l
      Scale: segment=tibia_l
      Scale: segment=talus_l
      Scale: segment=calcn_l
      Scale: segment=toes_l
      Scale: segment=torso
  MarkerPlacer:
    apply: true
    marker_file: ../trc/SB25.trc
    time_range: 0 0.15
    output_motion_file: ../out/SB25_static_ik.mot
    output_model_file: ../out/SB25_scaled.osim
    output_marker_file: ../out/SB25_markers_placed.xml
    max_marker_movement: -1
    IKTaskSet:
      IKMarkerTask R.ASIS: apply=true weight=10
      IKMarkerTask L.ASIS: apply=true weight=10
      IKMarkerTask V.Sacral: apply=true weight=10
      IKMarkerTask R.Knee.Lat: apply=true weight=5
      IKMarkerTask R.Knee.Med: apply=true weight=5
      IKMarkerTask L.Knee.Lat: apply=true weight=5
      IKMarkerTask L.Knee.Med: apply=true weight=5
      IKMarkerTask R.Ankle.Lat: apply=true weight=5
      IKMarkerTask R.Ankle.Med: apply=true weight=5
      IKMarkerTask L.Ankle.Lat: apply=true weight=5
      IKMarkerTask L.Ankle.Med: apply=true weight=5
      IKMarkerTask R.Shank.Front: apply=true weight=2
      IKMarkerTask L.Shank.Front: apply=true weight=2
      IKMarkerTask R.Heel: apply=true weight=2
      IKMarkerTask L.Heel: apply=true weight=2
      IKMarkerTask R.Toe.Tip: apply=true weight=2
      IKMarkerTask L.Toe.Tip: apply=true weight=2
      IKMarkerTask R.Midfoot.Lat: apply=true weight=1
      IKMarkerTask L.Midfoot.Lat: apply=true weight=1
      IKMarkerTask R.Toe.Med: apply=true weight=1
      IKMarkerTask L.Toe.Med: apply=true weight=1
      IKMarkerTask Sternum: apply=true weight=1
      IKMarkerTask Top.Head: apply=true weight=0.5
      IKMarkerTask R.Acromium: apply=true weight=1
      IKMarkerTask L.Acromium: apply=true weight=1
